// SBML level 3 version 1

model Model_generated_by_BIOCHAM()

  // Compartments:
  compartment compartmentOne = 1;

  // Species:
  species x__1 in compartmentOne = 1000;
  species x__2 in compartmentOne = 50;
  species x__3 in compartmentOne = 1;
  species x__4 in compartmentOne = 100;
  species x__5 in compartmentOne = 10;

  // Parameters:
  b = 4.9;
  C_E_0 = 1;
  D_D_0 = 8.1e-10;
  delta = 0.0001;
  e = 0.5;
  gamma = 0.026;
  I = 0.9;
  k_A_D = 1;
  k_B = 0.012;
  K_d = 1e-5;
  k_D = 0.001;
  k_D_A = 1;
  k_E = 0.0005;
  k_M = 0.022;
  K_s = 0.8;
  m1 = 1.5;
  m2 = 2.5;
  n = 0.43;
  nu = 6;
  Psi_A_D = 0.4;
  Psi_sat = -0.002;
  rho_b = 1200000;
  s = 0.6;
  s_th = 0.18;
  w = 4;
  Z_r = 0.4;

  // Reactions:
  R_1: x__4 => x__4 + x__5; k_D_A*x__4*(-0.25*Psi_A_D)^w*(1 + gamma)^(-1)*((-0.25*Psi_A_D)^w + (s^(-1*b)*(-1)*Psi_sat)^w)^(-1);
  R_2: x__3 => x__3 + 0.1 x__5; D_D_0*nu*x__3*delta^(-2)*n^m1*(1 + gamma)^(-1)*(1 + (-1*s_th))^m1*(rho_b*K_d + n*s)^(-1)*(s_th*(-1 + s_th)^(-1) + s*(-1)*(-1 + s_th)^(-1))^m2;
  R_3: x__2 => x__2 + x__5; D_D_0*e*nu*x__2*delta^(-2)*n^m1*(1 + gamma)^(-1)*(1 + (-1*s_th))^m1*(rho_b*K_d + n*s)^(-1)*(s_th*(-1 + s_th)^(-1) + s*(-1)*(-1 + s_th)^(-1))^m2;
  R_4: x__5 => ; k_M*x__5*(1 + gamma)^(-1);
  R_5: x__5 => x__2; k_B*x__5;
  R_6: x__5 => x__4; k_A_D*x__5*(s^(-1*b)*(-1)*Psi_sat)^w*((-1*Psi_A_D)^w + (s^(-1*b)*(-1)*Psi_sat)^w)^(-1);
  R_7: 0.1 x__5 => ; C_E_0*D_D_0*nu*delta^(-2)*n^m1*(1 + gamma)^(-1)*(1 + (-1*s_th))^m1*(rho_b*K_d + n*s)^(-1)*(s_th*(-1 + s_th)^(-1) + s*(-1)*(-1 + s_th)^(-1))^m2;
  R_8: x__4 => ; k_D_A*x__4*(-0.25*Psi_A_D)^w*((-0.25*Psi_A_D)^w + (s^(-1*b)*(-1)*Psi_sat)^w)^(-1);
  R_9: 0.1 x__4 => 0.1 x__2; k_B*x__4;
  R_10: => 0.1 x__3; C_E_0*D_D_0*nu*delta^(-2)*n^m1*(1 + (-1*s_th))^m1*(rho_b*K_d + n*s)^(-1)*(s_th*(-1 + s_th)^(-1) + s*(-1)*(-1 + s_th)^(-1))^m2;
  R_11: 0.1 x__3 => ; D_D_0*nu*x__3*delta^(-2)*n^m1*(1 + (-1*s_th))^m1*(rho_b*K_d + n*s)^(-1)*(s_th*(-1 + s_th)^(-1) + s*(-1)*(-1 + s_th)^(-1))^m2;
  R_12: x__3 => ; K_s*x__3*Z_r^(-1)*s^(3 + 2*b)*(rho_b*K_d + n*s)^(-1);
  R_13: x__3 => x__2; k_E*x__3;
  R_14: x__4 => x__2 + x__4; gamma*k_D_A*x__4*(-0.25*Psi_A_D)^w*((-0.25*Psi_A_D)^w + (s^(-1*b)*(-1)*Psi_sat)^w)^(-1);
  R_15: x__4 => 0.1 x__2 + x__4; gamma*k_B*x__4;
  R_16: x__5 => x__2 + x__5; gamma*k_B*x__5;
  R_17: x__1 + x__3 => x__2 + x__3; k_D*x__1*x__3;
  R_18: x__2 => ; D_D_0*nu*x__2*delta^(-2)*n^m1*(1 + (-1*s_th))^m1*(rho_b*K_d + n*s)^(-1)*(s_th*(-1 + s_th)^(-1) + s*(-1)*(-1 + s_th)^(-1))^m2 + K_s*x__2*Z_r^(-1)*s^(3 + 2*b)*(rho_b*K_d + n*s)^(-1);
  R_19: => x__1; I;
end
